*Heading
 Plate with hole, fixed left edge, 1MPa pressure right edge
** Job name: Platewithhole_tension Model name: Model-1
** Generated by: Abaqus/CAE 6.14-1
*Preprint, echo=NO, model=NO, history=NO, contact=NO
**
** PARTS
**
*Part, name="Plate with hole"
*Node
      1, 0.0911611617,  0.108838834
      2, 0.0874999985,  0.100000001
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*Element, type=CPS3
 1, 266, 265,  94
 2, 374, 337, 332
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*Element, type=CPS4R
 13, 147,  64,  63, 117
 14,   7,  90, 159,  89
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*Nset, nset=Set-1, generate
   1,  525,    1
*Elset, elset=Set-1, generate
   1,  487,    1
** Section: Plate  Section
*Solid Section, elset=Set-1, material=Steel
0.001,
*End Part
**
**
** ASSEMBLY
**
*Assembly, name=Assembly
**
*Instance, name="Plate with hole-1", part="Plate with hole"
*End Instance
**
*Nset, nset=_PickedSet4, internal, instance="Plate with hole-1"
 10, 12, 70, 71, 72, 73
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*Elset, elset=_PickedSet4, internal, instance="Plate with hole-1"
  20,  58,  59,  74,  77,  78
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*Elset, elset=__PickedSurf5_S4, internal, instance="Plate with hole-1"
  15,  44,  46,  47,  48,  56,  57, 131, 147
*Elset, elset=__PickedSurf5_S2, internal, instance="Plate with hole-1"
  28,  31,  50,  52,  53,  55,  97, 101, 102, 140
*Elset, elset=__PickedSurf5_S1, internal, instance="Plate with hole-1"
 43,
*Surface, type=ELEMENT, name=_PickedSurf5, internal
__PickedSurf5_S4, S4
__PickedSurf5_S2, S2
__PickedSurf5_S1, S1
*End Assembly
**
** MATERIALS
**
*Material, name=Steel
*Elastic
 2e+11, 0.3
**
** BOUNDARY CONDITIONS
**
** Name: Fixed left edge Type: Symmetry/Antisymmetry/Encastre
*Boundary
_PickedSet4, ENCASTRE
** ----------------------------------------------------------------
**
** STEP: Plateload
**
*Step, name=Plateload, nlgeom=NO
Pressure added to right edge
*Static
1., 1., 1e-05, 1.
**
** LOADS
**
** Name: Pressure Right Edge   Type: Pressure
*Dsload
_PickedSurf5, P, -1e+06
**
** OUTPUT REQUESTS
**
*Restart, write, frequency=0
**
** FIELD OUTPUT: F-Output-1
**
*Output, field, variable=PRESELECT
**
** HISTORY OUTPUT: H-Output-1
**
*Output, history, variable=PRESELECT
*End Step
